<?xml version="1.0"?>

<autopilot name="mq_autopilot">

<!-- INTERFACE PROPERTIES -->

  <property> ap/aileron_cmd       </property>
  <property> ap/elevator_cmd      </property>
  <property> ap/altitude_setpoint      </property>
  <property> ap/attitude_hold     </property>
  <property> ap/heading_hold      </property>


<!-- INITIAL GAIN VALUES -->

  <property> ap/alpha_setpoint </property>

  <property value="0"> fcs/heading-error-bias-switch  </property>
  <property value="0"> ap/heading_setpoint  </property>

  <property value="1"> ap/alpha_hold     </property>

  <property value="0.5">  ap/hdg-roll-err-c1 </property>


<!--
=====================================================
ROLL CHANNEL
=====================================================
-->

<!-- Wing leveler -->
<channel name="Roll wing leveler">

  <switch name="fcs/wing-leveler-ap-on-off">
    <default value="-1"/>
    <test value="0">
      ap/attitude_hold == 1
    </test>
  </switch>


  <pid name="fcs/roll-ap-error-pid">
    <input>attitude/phi-rad</input>
    <kp> 2.5 </kp>
    <ki> 0 </ki>
    <kd> 0.05 </kd>
    <trigger> fcs/wing-leveler-ap-on-off </trigger>
  </pid>

  <switch name="fcs/roll-ap-autoswitch">
    <default value="0.0"/>
    <test value="-fcs/roll-ap-error-pid">
      ap/attitude_hold == 1
    </test>
  </switch>

</channel>

<!-- Heading hold -->

<channel name="Roll heading hold">
  <pure_gain name="fcs/heading-true-degrees">
    <input>attitude/heading-true-rad</input>
    <gain>57.3</gain> <!-- convert to degrees -->
  </pure_gain>

  <summer name="fcs/heading-error">
    <input> -fcs/heading-true-degrees</input>
    <input> fcs/heading-true-degrees </input>
  </summer>

  <switch name="fcs/heading-error-bias-switch">
    <default value="0.0"/>
    <test value="360.0">
      fcs/heading-error lt -180
    </test>
    <test value="-360.0">
      fcs/heading-error gt 180
    </test>
  </switch>

  <summer name="fcs/heading-corrected">
    <input> fcs/heading-error-bias-switch </input>
    <input> fcs/heading-error </input>
    <clipto>
      <min>-30</min>
      <max>30</max>
    </clipto>
  </summer>

  <pure_gain name="fcs/heading-command">
    <input> fcs/heading-corrected </input>
    <gain> 0.01745 </gain>
  </pure_gain>

  <lag_filter name="fcs/heading-roll-error-lag">
    <input> fcs/heading-command </input>
    <c1> ap/hdg-roll-err-c1 </c1>
  </lag_filter>

  <summer name="fcs/heading-roll-error">
    <input> fcs/heading-roll-error-lag </input>
    <input> -attitude/phi-rad </input>
  </summer>

  <switch name="fcs/heading-roll-error-switch">
    <default value="0.0"/>
    <test value="fcs/heading-roll-error">
      ap/heading_hold == 1
    </test>
  </switch>

  <pid name="fcs/heading-pi-controller">
    <input> fcs/heading-roll-error-switch </input>
    <kp> 1.5 </kp>
    <ki> 0 </ki>
    <kd> 0.5 </kd>
  </pid>

  <switch name="fcs/roll-command-selector">
    <default value="0.0"/>
    <test value="fcs/heading-pi-controller">
      ap/heading_hold == 1
      gear/unit[2]/WOW == 0
    </test>
    <test value="fcs/roll-ap-autoswitch">
      ap/attitude_hold == 1
      gear/unit[2]/WOW == 0
    </test>
    <output>ap/aileron_cmd</output>
  </switch>
<!--
  <switch name="fcs/roll-command-selector-steering">
    <default value="0.0"/>
    <test value="fcs/heading-pi-controller">
      ap/heading_hold == 1
      gear/unit/WOW == 1
    </test>
    <output>fcs/steer-cmd-norm</output>
  </switch>
-->
</channel>


<channel name="Theta hold">
  <!-- Compute the error between the target alpha and the actual value -->
  <summer name="aero/alpha-error">
    <input> ap/alpha_setpoint </input>
    <input> -attitude/pitch-rad </input>
    <clipto>
      <min>-1.1</min>
      <max> 1.1</max>
    </clipto>
  </summer>

  <pid name="ap/elevator_cmd">
    <input> aero/alpha-error </input>
    <kp> -1.5516 </kp>
    <ki> 0.005 </ki>
    <kd> 0.05 </kd>
    <clipto>
      <min> -1 </min>
      <max> 1</max>
    </clipto>
  </pid>

</channel>
</autopilot>
